# Worksheet setting: ORIGIN = 1
# обоснование типа производства и вида поточной линии
r := 0.48
n_wdays := 22
n_wshift := 2
work_t := 8
repair_loss := 0.97
m := 9
t := [1.92; 1.40; 0.48; 0.48; 0.56; 1.48; 0.48; 1.44; 0.40]
ratio := t/r = [4; 2.91667; 1; 1; 1.16667; 3.08333; 1; 3; 0.833333]
N := n_wdays*n_wshift*work_t*60*repair_loss/r = 42680
C_p := sum(t[i], i = 1 .. m)/r = 18
K_sp := m/C_p = 0.5
K_m := sum(t[i], i = 1 .. m)/(m*r) = 2
# проверка кратности норм времени такту с допустимым отклонением(5-7%) ?
r*0.05 = 0.024
r*0.07 = 0.0336
# рассчёт календарно-плановых нормативов и построение стандарт-плана
solve block
    # guess values
    k := 1.0
    # constraints
    ratio[2]/k == 3
    # solver
    find(k) = 0.972222
end solve block
solve block
    # guess values
    k := 1.0
    # constraints
    ratio[5]/k == 1
    # solver
    find(k) = 1.16667
end solve block
solve block
    # guess values
    k := 1.0
    # constraints
    ratio[6]/k == 3
    # solver
    find(k) = 1.02778
end solve block
solve block
    # guess values
    k := 1.0
    # constraints
    ratio[9]/k == 1
    # solver
    find(k) = 0.833333
end solve block
# норма штучного времени на данной i-ой операции с учётом коэффициента выполнения норм времени, мин
t' := [t[1]; t[2]; t[3]; t[4]; t[5]/1.167; t[6]/1.028; t[7]; t[8]; t[9]]
t' = [1.92; 1.4; 0.48; 0.48; 0.479863; 1.43969; 0.48; 1.44; 0.4]
# кол-во раб мест по операциям | по всей линии
i := 1 .. m
C_p[i] := t'[i]/r = [4; 2.91667; 1; 1; 0.999714; 2.99935; 1; 3; 0.833333]
sum(C_p[i], i = 1 .. m) = 17.7491
# Если нормы времени на операциях равны или кратны такту, то при расчёте
# количества рабочих мест получаем целые числа. В случае если процесс не пол-
# ностью синхронизирован, то полученное по расчёту число единиц оборудова-
# ния (рабочих мест) после соответственного анализа округляется до целого чис-
# ла в большую или меньшую сторону (Спр).
C_np[i] := round(C_p[i]) = [4; 3; 1; 1; 1; 3; 1; 3; 1]
C_l := sum(C_np[i], i = 1 .. m) = 18
# Коэффициент загрузки рабочих мест (оборудования) на каждой i-й операции
K_з[i] := C_p[i]/C_np[i] = [1; 0.972222; 1; 1; 0.999714; 0.999784; 1; 1; 0.833333]
K_з.ср := sum(C_p[i], i = 1 .. m)/sum(C_np[i], i = 1 .. m) = 0.986059
# расчётное кол-во единиц оборудования | принятое кол-во единиц оборудования
sum(C_p) = 17.7491
sum(C_np) = 18
C_np = [4; 3; 1; 1; 1; 3; 1; 3; 1]
C_np := [1; 3; 3; 1; 1; 1; 3; 1; 3; 1]
m := 10
i := 1 .. m
# скорость движения конвейера
l_np := 0.7
V := l_np/r = 1.45833
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# период конвейера ( least common multiple)
П := lcm(C_np) = 3
# рабочая длинна ленты распределённого конвейера
L_p := sum(C_np*l_np) = 12.6
L_p := sum(C_np)*l_np = 12.6
# полная длинна конвейера
D := 0.3
L_n := 2*L_p + π*D = 26.1425
K := L_n/(П*l_np) = 12.4488
K := ceil(K) = 13
K*П*l_np = 27.3
# заделы
# резервный задел
Z_tech := C_l = 18
Z_tr := C_l - 1 = 17
Z_rez := 0.05*N/(2*22) = 48.5
Z_0 := Z_tech + Z_tr + Z_rez = 83.5
# величина незавершённого производства
H_в := Z_0*sum(t')/(2*60) = 5.92819
# величина незавершённого производства в денежном выражении
H_З := Z_0*C_z  # error: Эта переменная не определена. Проверьте правильность установки обозначения.
# темп поточной линии
ρ := 1/r*60 = 125
# часовая производительность конвейера
Q := 1
q_r := ρ*Q = 125
# мощность потребляемая конвейером
Q_k := 6
W := 1.2*(0.16*L_n*V*Q_k/36 + 0.16*L_n*q_r/270) = 3.54376
L_n = 26.1425
Q_k = 6
V = 1.45833
q_r = 125
P_уст.к := 0.736*W = 2.60821
# рассчёт производственной площади
S_verst := 1200*700*18*3.5 = 52920000
S_conv := 26142*300*1 = 7842600
S_sum := S_verst + S_conv = 60762600
S_aux := S_sum*0.45 = 27343170
S_sum := S_sum + S_aux = 88105770
# расчёт стоимости здания
Sum_prod := 170*60.76 = 10329.2
Sum_aux := 250*27.34 = 6835
60.76 + 27.34 = 88.1
Sum := Sum_prod + Sum_aux = 17164.2
Amort_prod := Sum_prod*0.027 = 278.888
Amort_aux := Sum_aux*0.031 = 211.885
Amort_total := Amort_prod + Amort_aux = 490.773
Amort_prod + Amort_aux = 490.773
# расчёт стоимости раб машин
C_run_m := 23.83  # цена погонного метра
P_pipe := L_n*C_run_m + L_n*C_run_m*0.4 = 872.165
j := 1 .. 2
DeprRate := [0.077; 0.152]
N_units := [18; 1]
C_opt := [360; P_pipe]
C_real[j] := N_units[j]*C_opt[j] = [6480; 872.165]
C_pack[j] := 0.1*C_real[j] = [648; 87.2165]
C_orig[j] := C_real[j] + C_real[j]*0.01 = [6544.8; 880.887]
DeprSum[j] := DeprRate[j]*C_orig[j] = [503.95; 133.895]
sum(C_pack) = 735.217
S_orig := sum(C_orig) = 7425.69
S_real := sum(C_real) = 7352.17
sum(DeprSum) = 637.844
# расчёт затрат на энергетическое оборудование
K_э := 45*P_уст.к = 117.369
P_уст.к = 2.60821
K_ос := 0.1*S_orig = 742.569
S_orig = 7425.69
K_из := 0.02*S_real = 147.043
# затраты на производственный и хоз инвентарь
S_orig = 7425.69
K_пр.ин := 0.02*S_orig = 148.514
K_х.ин := 15.4*C_l*2 = 554.4
K_ин := K_пр.ин + K_х.ин = 702.914
# стоимость осн произв фондов и аморт отчислений
Sum = 17164.2
K_зд := Sum
K_об := S_orig
ProdAssets := [K_э; K_ос; K_из; K_ин] = [117.369; 742.569; 147.043; 702.914]
deprRate := [0.082; 0.045; 0.115; 0.185]
i := 1 .. length(deprRate)
deprAmount[i] := ProdAssets[i]*deprRate[i] = [9.62428; 33.4156; 16.91; 130.039]
О_пр.ф := sum(ProdAssets) + K_зд + K_об = 26299.8
P_o := sum(deprAmount) + Amort_total + sum(DeprSum) = 1318.61
# расчёт численности промышленно-произв-ого персонала
K_cn := 0.1
C_np := sum(C_np) = 18
K_cm := 2
Ч_оп.с := C_np*K_cm/(1 - K_cn) = 40
N_main_imp := 40
N_aux_imp := 13
N_c_imp := 2
N_imp := N_main_imp + N_aux_imp + N_c_imp = 55
N_main_imp/N_imp*100 = 72.7273
N_aux_imp/N_imp*100 = 23.6364
N_c_imp/N_imp*100 = 3.63636
# расчёт основной зарплаты основных производственных рабочих
i := 1 .. length(t')
K_прем := 1.4
C_m := 0.8
t' = [1.92; 1.4; 0.48; 0.48; 0.479863; 1.43969; 0.48; 1.44; 0.4]
P_з.о[i] := t'[i]*C_m/60 = [0.0256; 0.0186667; 0.0064; 0.0064; 0.00639817; 0.0191958; 0.0064; 0.0192; 0.00533333]
P_з.о := sum(P_з.о) = 0.113594
P_з.д := P_з.о*0.4 = 0.0454376
P_з.о + P_з.о*0.4 = 0.159032
# основная и доп зп ППП
F_э := 22*8*0.87 = 153.12
K_д.з := 1.4
Ч_в.р := 13
C_m.i := 0.754
P_з.в.р := K_д.з*Ч_в.р*F_э*C_m.i = 2101.24
P_з.с := 1.4*2*(1.307*8*22) = 644.09
P_з.ппп.м := P_з.в.р + P_з.с = 2745.32
K_з.п := 2
P_з.ппп := (P_з.о + P_з.д)*K_з.п = 0.318063
# отчисления в гос фонд соц защиты
P_з.о.м := N*P_з.о = 4848.19
H_с.з := 35
P_з.о = 0.113594
P_з.д = 0.0454376
P_з.д.м := 0.4*P_з.о.м = 1939.28
P_с.з := (P_з.о.м + P_з.д.м + P_з.ппп.м)*35/100 = 3336.48
P_с.з.j := (P_з.о + P_з.д + P_з.ппп)*35/100 = 0.166983
# топливо и электроэнергия для технологических целей
P_уст.к = 2.60821
P_э := P_уст.к*170.72*0.035*2*0.6*0.4*1*1.15/0.75 = 11.4702
P_э/N = 0.00026875
# затраты на освещение
P_з.о = 0.113594
N = 42680
P_п.о.j := P_з.о*10/100 = 0.0113594
P_п.о := P_п.о.j*N = 484.819
# износ инструментов
P_з.о.м = 4848.19
P_з.о = 0.113594
P_из.j := P_з.о*10/100 = 0.0113594
P_из := P_з.о.м*10/100 = 484.819
# амортизационные отчисления основных производственных фондов
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P_o = 1318.61
P_з.о = 0.113594
P_з.о.м = 4848.19
P_a.j := P_o*P_з.о/(P_з.о.м*12) = 0.0025746
N = 42680
P_a := P_a.j*N = 109.884
# общепроизводственные расходы
H_оп := 80
P_оп.j := P_з.о*H_оп/100 = 0.0908752
P_оп := P_оп.j*N = 3878.55
# общехозяйственные расходы
H_ох := 60
P_ох.j := P_з.о*H_ох/100 = 0.0681564
P_ох := P_ох.j*N = 2908.92
# прочие производственные расходы
C_np = 18
P_м := 0.113503
P_к := 107.36
C_пр.j := P_м + P_к + P_з.о + P_з.д + P_з.ппп + P_с.з.j + P_э + P_п.о.j + P_из.j + P_a.j + P_оп.j + P_ох.j = 119.772
P_пр.j := C_пр.j/100 = 1.19772
P_пр := P_пр.j*N = 51118.7
C_пр.j := C_пр.j + P_пр.j = 120.97
C_пр := C_пр.j*N = 5162994
# коммерческие расходы
P_ком.j := C_пр.j/100 = 1.2097
P_ком := P_ком.j*N = 51629.9
C_п.j := C_пр.j + P_ком.j = 122.18
C_п := C_п.j*N = 5214623
П_н.j := C_п.j*30/100 = 36.6539
П_н := П_н.j*N = 1564387
# расчёт предприятия
Ц_п.j := C_п.j + П_н.j = 158.833
Ц_п := Ц_п.j*N = 6779011
# цена без учёта НДС
Ц_о.ц.j := Ц_п.j = 158.833
Ц_о.ц := Ц_о.ц.j*N = 6779011
# расчёт НДС
H_ндс := 20
P_ндс.j := Ц_о.ц.j*H_ндс/100 = 31.7667
P_ндс := P_ндс.j*N = 1355802
# расчёт цены реализации с учётом косвенных налогов
Ц_р.j := Ц_о.ц.j + P_ндс.j = 190.6
Ц_р := Ц_р.j*N = 8134813
# расчёт технико-экономических показателей работы участка
# потребность в оборотных средствах
O_ос := О_пр.ф*50/100 = 13149.9
О_пр.ф = 26299.8
# полная себестоимость планового объема прод
C_п.j = 122.18
C_п = 5214623
# объем реализуемой прод за плановый период
T_p := Ц_р.j*N = 8134813
Ц_р.j = 190.6
N = 42680
# затраты на условную единицу реализуемой продукции
З_р.п := C_п/T_p = 0.641026
# общая сумма прибыли от реализации прод
П_р.п := T_p - C_п - P_ндс = 1564387
T_p = 8134813
C_п = 5214623
P_ндс = 1355802
П_пр.р := П_р.п*0.15 = 234658
П_р := П_р.п + П_пр.р = 1799045
# расчёт балансовой прибыли предприятия
П_в := 0
У_в := 0
П_б := П_р + П_в + У_в = 1799045
# налог на недвижимость
P_a = 109.884
О_пр.ф = 26299.8
И_з := P_a
О_пр := О_пр.ф - И_з = 26189.9
H_ндв := 1
P_н.пр := О_пр*H_ндв/(12*100) = 21.8249
# расчёт налога на нормируемые оборотные средства
P_н.ос := O_ос*1/(12*100) = 10.9582
O_ос = 13149.9
# расчёт общей суммы налога на недвижимость
P_ндв := P_н.пр + P_н.ос = 32.7832
P_н.пр = 21.8249
P_н.ос = 10.9582
# расчёт налогооблагаемой прибыли
П_б = 1799045
P_н.пр = 21.8249
П_н.о := П_б - P_н.пр = 1799023
# расчёт налога на прибыль
H_пр := 24
P_пр := П_н.о*H_пр/100 = 431766
# расчёт размера транспортного налога
H_тр := 5
П_лн := 0
П_н.до := 0
P_тр := (П_б - П_н.до - П_лн - P_ндв - P_пр)*H_тр/100 = 68362.3
П_б = 1799045
P_ндв = 32.7832
P_пр = 431766
# расчёт чистой прибыли
П_ч := П_б - P_ндв - P_пр - P_тр = 1298884
P_пр = 431766
# расчёт уровня рентабельности изделия
Ц_п.j = 158.833
C_п.j = 122.18
У_изд.j := (Ц_п.j - C_п.j)/C_п.j*100 = 30
# расчёт уровня рентабельности производства
У_р.п := П_ч*100/(О_пр.ф + O_ос) = 3292.51
П_ч = 1298884
О_пр.ф = 26299.8
O_ос = 13149.9
# расчёт фондоотдачи
T_p = 8134813
О_пр.ф = 26299.8
Ф_о := T_p/О_пр.ф = 309.311
emp_perf := T_p/40 = 203370
emp_perf*40 = 8134813
N = 42680
T_p = 8134813
C_п = 5214623
З_р.п = 0.641026
П_ч = 1298884
9953229/36 = 276479
O_ос = 13149.9
276478.583*□
P_з.ппп.м + P_з.о*N + P_з.д*N = 9532.79
(P_з.о.м + P_з.д.м + P_з.ппп.м)*1/53 = 179.864
